// SBML level 2 version 1
// Created by MetaFluxNet on 2010-3-16 15:3

model H10()

  // Compartments:
  compartment cell;

  // Species:
  species a_3hmrsACP in cell = 1/cell;
  species a_5mdr1p in cell = 1/cell;
  species glucys in cell = 1/cell;
  species dann in cell = 1/cell;
  species glc_D in cell = 1/cell;
  species a_3hdecACP in cell = 1/cell;
  species a_2dhp in cell = 1/cell;
  species mana in cell = 1/cell;
  species ocACP in cell = 1/cell;
  species dmlz in cell = 1/cell;
  species apoC_Lys_btn in cell = 1/cell;
  species a_23dhmp in cell = 1/cell;
  species prpp in cell = 1/cell;
  species mg2 in cell = 1/cell;
  species udpg in cell = 1/cell;
  species uGgla in cell = 1/cell;
  species udcpdp in cell = 1/cell;
  species a_5mtr in cell = 1/cell;
  species thf in cell = 1/cell;
  species ump in cell = 1/cell;
  species but2eACP in cell = 1/cell;
  species a_23dhmb in cell = 1/cell;
  species uama in cell = 1/cell;
  species acgam1p in cell = 1/cell;
  species acg5p in cell = 1/cell;
  species dcaACP in cell = 1/cell;
  species $ac_b in cell = 1/cell;
  species for in cell = 1/cell;
  species a_2dda7p in cell = 1/cell;
  species thmpp in cell = 1/cell;
  species gam6p in cell = 1/cell;
  species ile_L in cell = 1/cell;
  species a_12dgr181 in cell = 1/cell;
  species a_5mta in cell = 1/cell;
  species uamr in cell = 1/cell;
  species a_2ahhmd in cell = 1/cell;
  species gal1p in cell = 1/cell;
  species gln_L in cell = 1/cell;
  species a_12ppd_R in cell = 1/cell;
  species a_25aics in cell = 1/cell;
  species xylu_D in cell = 1/cell;
  species actACP in cell = 1/cell;
  species csn in cell = 1/cell;
  species gtca1_45 in cell = 1/cell;
  species cu_b in cell = 1/cell;
  species ppcoa in cell = 1/cell;
  species apoC_Lys in cell = 1/cell;
  species pnto_R_b in cell = 1/cell;
  species a_1tdecg3p in cell = 1/cell;
  species a_2ahhmp in cell = 1/cell;
  species dtdp4d6dg in cell = 1/cell;
  species a_26dap_M in cell = 1/cell;
  species thm_b in cell = 1/cell;
  species a_3hoctaACP in cell = 1/cell;
  species xan in cell = 1/cell;
  species a_3ooctdACP in cell = 1/cell;
  species orot5p in cell = 1/cell;
  species mlthf in cell = 1/cell;
  species dhnpt in cell = 1/cell;
  species cystrna in cell = 1/cell;
  species duri in cell = 1/cell;
  species phom in cell = 1/cell;
  species $for_e_ in cell = 1/cell;
  species gcald in cell = 1/cell;
  species glyc in cell = 1/cell;
  species arab_L in cell = 1/cell;
  species a_4mpetz in cell = 1/cell;
  species trnalys in cell = 1/cell;
  species amp in cell = 1/cell;
  species fol in cell = 1/cell;
  species $nh4_b in cell = 1/cell;
  species dgtp in cell = 1/cell;
  species asp_L in cell = 1/cell;
  species nadp in cell = 1/cell;
  species thm in cell = 1/cell;
  species trnaglu in cell = 1/cell;
  species dgmp in cell = 1/cell;
  species leutrna in cell = 1/cell;
  species $h2_e_ in cell = 1/cell;
  species $a_4abz_e_ in cell = 1/cell;
  species a_3dhsk in cell = 1/cell;
  species $gcald_b in cell = 1/cell;
  species $ac_e_ in cell = 1/cell;
  species r5p in cell = 1/cell;
  species a_3opalmACP in cell = 1/cell;
  species ugmda in cell = 1/cell;
  species zn2 in cell = 1/cell;
  species nadh in cell = 1/cell;
  species rib_D in cell = 1/cell;
  species nadph in cell = 1/cell;
  species gsn in cell = 1/cell;
  species orn_e_ in cell = 1/cell;
  species a_5mdru1p in cell = 1/cell;
  species glc_B_D in cell = 1/cell;
  species fdp in cell = 1/cell;
  species a_12dgr_CA in cell = 1/cell;
  species glu_L in cell = 1/cell;
  species a_2pg in cell = 1/cell;
  species orn in cell = 1/cell;
  species a_4mop in cell = 1/cell;
  species icit in cell = 1/cell;
  species thymd in cell = 1/cell;
  species pppi in cell = 1/cell;
  species glu5p in cell = 1/cell;
  species acglu in cell = 1/cell;
  species lcts in cell = 1/cell;
  species thdp in cell = 1/cell;
  species gdptp in cell = 1/cell;
  species argtrna in cell = 1/cell;
  species $glc_D_e_ in cell = 1/cell;
  species e4hglu in cell = 1/cell;
  species athr_L in cell = 1/cell;
  species a_2ippm in cell = 1/cell;
  species cobalt2 in cell = 1/cell;
  species cit in cell = 1/cell;
  species $co2_b in cell = 1/cell;
  species a_2pglyc in cell = 1/cell;
  species g1p_B in cell = 1/cell;
  species lys_L in cell = 1/cell;
  species mercplac in cell = 1/cell;
  species $n2_e_ in cell = 1/cell;
  species s7p in cell = 1/cell;
  species nac_b in cell = 1/cell;
  species mobd in cell = 1/cell;
  species $na1_b in cell = 1/cell;
  species ggl in cell = 1/cell;
  species sertrna in cell = 1/cell;
  species man1p in cell = 1/cell;
  species trnaarg in cell = 1/cell;
  species thex2eACP in cell = 1/cell;
  species $etoh_b in cell = 1/cell;
  species f1p in cell = 1/cell;
  species trnaala in cell = 1/cell;
  species a_2cpr5p in cell = 1/cell;
  species a_3ohexACP in cell = 1/cell;
  species gdp in cell = 1/cell;
  species a_12dgr141 in cell = 1/cell;
  species a_3pg in cell = 1/cell;
  species a_1tdec7eg3p in cell = 1/cell;
  species palmACP in cell = 1/cell;
  species cu in cell = 1/cell;
  species fc1p in cell = 1/cell;
  species lystrna in cell = 1/cell;
  species a_3omrsACP in cell = 1/cell;
  species achms in cell = 1/cell;
  species $cobalt2_e_ in cell = 1/cell;
  species cdpdhdec9eg in cell = 1/cell;
  species pap in cell = 1/cell;
  species hdca in cell = 1/cell;
  species ctp in cell = 1/cell;
  species lipo4_24_CA in cell = 1/cell;
  species acg5sa in cell = 1/cell;
  species $h_b in cell = 1/cell;
  species mercppyr in cell = 1/cell;
  species stchs in cell = 1/cell;
  species udp in cell = 1/cell;
  species dhor_S in cell = 1/cell;
  species coa in cell = 1/cell;
  species cmp in cell = 1/cell;
  species a_13dpg in cell = 1/cell;
  species actp in cell = 1/cell;
  species drib in cell = 1/cell;
  species dcdp in cell = 1/cell;
  species a_3spyr in cell = 1/cell;
  species xtsn in cell = 1/cell;
  species ribflv_b in cell = 1/cell;
  species pg_CA in cell = 1/cell;
  species $succ_b in cell = 1/cell;
  species gdpddman in cell = 1/cell;
  species suchms in cell = 1/cell;
  species CELLWALL in cell = 1/cell;
  species ps120 in cell = 1/cell;
  species mettrna in cell = 1/cell;
  species man in cell = 1/cell;
  species cdpdhdecg in cell = 1/cell;
  species a_5apru in cell = 1/cell;
  species man6p in cell = 1/cell;
  species co2 in cell = 1/cell;
  species amet in cell = 1/cell;
  species $h2_b in cell = 1/cell;
  species a_5aprbu in cell = 1/cell;
  species a_3c3hmp in cell = 1/cell;
  species mqn7 in cell = 1/cell;
  species butACP in cell = 1/cell;
  species adp in cell = 1/cell;
  species mthgxl in cell = 1/cell;
  species adn in cell = 1/cell;
  species ttdca in cell = 1/cell;
  species ddca in cell = 1/cell;
  species psetha_CA in cell = 1/cell;
  species tddec2eACP in cell = 1/cell;
  species tpalm2eACP in cell = 1/cell;
  species a_5mcsn in cell = 1/cell;
  species ade in cell = 1/cell;
  species iasp in cell = 1/cell;
  species dtdpglu in cell = 1/cell;
  species galur in cell = 1/cell;
  species pa181 in cell = 1/cell;
  species $gln_L_e_ in cell = 1/cell;
  species trnathr in cell = 1/cell;
  species ocdcaACP in cell = 1/cell;
  species sucr in cell = 1/cell;
  species a_4hpro_LT in cell = 1/cell;
  species ru5p_D in cell = 1/cell;
  species ps140 in cell = 1/cell;
  species pe_CA in cell = 1/cell;
  species ru5p_L in cell = 1/cell;
  species acser in cell = 1/cell;
  species succ in cell = 1/cell;
  species pnto_R_e_ in cell = 1/cell;
  species nad in cell = 1/cell;
  species skm in cell = 1/cell;
  species valtrna in cell = 1/cell;
  species nac in cell = 1/cell;
  species uamag in cell = 1/cell;
  species $rib_D_e_ in cell = 1/cell;
  species a_12dgr120 in cell = 1/cell;
  species a_5fthf in cell = 1/cell;
  species tdeACP in cell = 1/cell;
  species trnaser in cell = 1/cell;
  species fruur in cell = 1/cell;
  species mn2 in cell = 1/cell;
  species prlp in cell = 1/cell;
  species mql7 in cell = 1/cell;
  species gar in cell = 1/cell;
  species gal in cell = 1/cell;
  species gam in cell = 1/cell;
  species protrna in cell = 1/cell;
  species hpyr in cell = 1/cell;
  species alac_S in cell = 1/cell;
  species chor in cell = 1/cell;
  species dutp in cell = 1/cell;
  species pg180 in cell = 1/cell;
  species pg181 in cell = 1/cell;
  species lgt_S in cell = 1/cell;
  species prbatp in cell = 1/cell;
  species thm_e_ in cell = 1/cell;
  species a_14bxyl in cell = 1/cell;
  species $h2o_e_ in cell = 1/cell;
  species a_2ddglcn in cell = 1/cell;
  species $succ_e_ in cell = 1/cell;
  species ps160 in cell = 1/cell;
  species ps161 in cell = 1/cell;
  species $ni2_e_ in cell = 1/cell;
  species adprib in cell = 1/cell;
  species fdred in cell = 1/cell;
  species dadp in cell = 1/cell;
  species myrsACP in cell = 1/cell;
  species ac in cell = 1/cell;
  species nicrnt in cell = 1/cell;
  species pphn in cell = 1/cell;
  species his_L in cell = 1/cell;
  species trnaasn in cell = 1/cell;
  species a_12dgr140 in cell = 1/cell;
  species trnaasp in cell = 1/cell;
  species accoa in cell = 1/cell;
  species $k_b in cell = 1/cell;
  species $h2o_b in cell = 1/cell;
  species pgp180 in cell = 1/cell;
  species pgp181 in cell = 1/cell;
  species $fe2_e_ in cell = 1/cell;
  species fmettrna in cell = 1/cell;
  species a_2hb in cell = 1/cell;
  species pant_R in cell = 1/cell;
  species thfglu in cell = 1/cell;
  species TRACE in cell = 1/cell;
  species ACP in cell = 1/cell;
  species saccrp_L in cell = 1/cell;
  species dhap in cell = 1/cell;
  species $fe2_b in cell = 1/cell;
  species pep in cell = 1/cell;
  species trnapro in cell = 1/cell;
  species asntrna in cell = 1/cell;
  species acACP in cell = 1/cell;
  species met_L in cell = 1/cell;
  species pyr in cell = 1/cell;
  species a_5aizc in cell = 1/cell;
  species dnad in cell = 1/cell;
  species hom_L in cell = 1/cell;
  species lipo3_24_CA in cell = 1/cell;
  species thmmp in cell = 1/cell;
  species aps in cell = 1/cell;
  species glntrna in cell = 1/cell;
  species cdpdodecg in cell = 1/cell;
  species pram in cell = 1/cell;
  species trp_L in cell = 1/cell;
  species a_2mcit in cell = 1/cell;
  species pran in cell = 1/cell;
  species $nh4_e_ in cell = 1/cell;
  species a_4ppan in cell = 1/cell;
  species $so4_e_ in cell = 1/cell;
  species melt in cell = 1/cell;
  species a_12dgr161 in cell = 1/cell;
  species a_12dgr160 in cell = 1/cell;
  species ps141 in cell = 1/cell;
  species $etoh_e_ in cell = 1/cell;
  species oaa in cell = 1/cell;
  species arg_L_e_ in cell = 1/cell;
  species ca2_b in cell = 1/cell;
  species dcyt in cell = 1/cell;
  species dump in cell = 1/cell;
  species ala_L in cell = 1/cell;
  species lipo1_24_CA in cell = 1/cell;
  species ala_B in cell = 1/cell;
  species a_3hddecACP in cell = 1/cell;
  species hexACP in cell = 1/cell;
  species ala_D in cell = 1/cell;
  species na1 in cell = 1/cell;
  species cellb in cell = 1/cell;
  species glyclt in cell = 1/cell;
  species $cellb_e_ in cell = 1/cell;
  species alaala in cell = 1/cell;
  species lac_L in cell = 1/cell;
  species quln in cell = 1/cell;
  species lald_L in cell = 1/cell;
  species cdpdtdecg in cell = 1/cell;
  species trdrd in cell = 1/cell;
  species lac_D in cell = 1/cell;
  species hdeACP in cell = 1/cell;
  species pro_L in cell = 1/cell;
  species pi in cell = 1/cell;
  species aicar in cell = 1/cell;
  species $btn_e_ in cell = 1/cell;
  species acald in cell = 1/cell;
  species cytd in cell = 1/cell;
  species glyc_R in cell = 1/cell;
  species ugmd in cell = 1/cell;
  species glutrna in cell = 1/cell;
  species cys_L in cell = 1/cell;
  species argsuc in cell = 1/cell;
  species a_1p3h5c in cell = 1/cell;
  species ps_CA in cell = 1/cell;
  species uaGgla in cell = 1/cell;
  species ser_L in cell = 1/cell;
  species mobd_b in cell = 1/cell;
  species pgp140 in cell = 1/cell;
  species pgp141 in cell = 1/cell;
  species $co2_e_ in cell = 1/cell;
  species trp_L_e_ in cell = 1/cell;
  species phpyr in cell = 1/cell;
  species prfp in cell = 1/cell;
  species dmbzid in cell = 1/cell;
  species a_1ddecg3p in cell = 1/cell;
  species dgdp in cell = 1/cell;
  species ca2 in cell = 1/cell;
  species $cl_b in cell = 1/cell;
  species dad_2 in cell = 1/cell;
  species $glc_D_b in cell = 1/cell;
  species $a_4abz_b in cell = 1/cell;
  species uacmam in cell = 1/cell;
  species a_1odec11eg3p in cell = 1/cell;
  species uAgla in cell = 1/cell;
  species cbp in cell = 1/cell;
  species asn_L in cell = 1/cell;
  species a_3odecACP in cell = 1/cell;
  species ribflv in cell = 1/cell;
  species indole in cell = 1/cell;
  species uaAgla in cell = 1/cell;
  species a_4abut in cell = 1/cell;
  species methf in cell = 1/cell;
  species tmrs2eACP in cell = 1/cell;
  species a_3php in cell = 1/cell;
  species d12dg_CA in cell = 1/cell;
  species dtmp in cell = 1/cell;
  species ethap in cell = 1/cell;
  species uagmda in cell = 1/cell;
  species fad in cell = 1/cell;
  species PROTEIN in cell = 1/cell;
  species trnahis in cell = 1/cell;
  species ppap in cell = 1/cell;
  species pgp160 in cell = 1/cell;
  species pgp161 in cell = 1/cell;
  species a_3ig3p in cell = 1/cell;
  species cellb_b in cell = 1/cell;
  species udpgal in cell = 1/cell;
  species $pi_b in cell = 1/cell;
  species hxan in cell = 1/cell;
  species a_2dr5p in cell = 1/cell;
  species a_3oddecACP in cell = 1/cell;
  species $man_e_ in cell = 1/cell;
  species $for_b in cell = 1/cell;
  species $lys_L_e_ in cell = 1/cell;
  species cdlp_CA in cell = 1/cell;
  species so3 in cell = 1/cell;
  species a_4ppcys in cell = 1/cell;
  species a_3mob in cell = 1/cell;
  species $lac_L_b in cell = 1/cell;
  species prbamp in cell = 1/cell;
  species trnaile in cell = 1/cell;
  species DNA in cell = 1/cell;
  species histrna in cell = 1/cell;
  species ni2 in cell = 1/cell;
  species octeACP in cell = 1/cell;
  species dtbt in cell = 1/cell;
  species cobalt2_b in cell = 1/cell;
  species a_3mop in cell = 1/cell;
  species a_12dgr180 in cell = 1/cell;
  species fum in cell = 1/cell;
  species tdec2eACP in cell = 1/cell;
  species malttr in cell = 1/cell;
  species apoACP in cell = 1/cell;
  species a_3psme in cell = 1/cell;
  species glcur in cell = 1/cell;
  species val_L in cell = 1/cell;
  species nh4 in cell = 1/cell;
  species tagur in cell = 1/cell;
  species epm in cell = 1/cell;
  species cdpdddecg in cell = 1/cell;
  species f6p in cell = 1/cell;
  species trnaleu in cell = 1/cell;
  species a_4dglc4egalur in cell = 1/cell;
  species malACP in cell = 1/cell;
  species uacgam in cell = 1/cell;
  species pmtcoa in cell = 1/cell;
  species cgmp in cell = 1/cell;
  species $BIOMASS_b in cell = 1/cell;
  species hco3 in cell = 1/cell;
  species glyald in cell = 1/cell;
  species ahdt in cell = 1/cell;
  species $lac_L_e_ in cell = 1/cell;
  species $n2_b in cell = 1/cell;
  species pa120 in cell = 1/cell;
  species mh4spt in cell = 1/cell;
  species a_3hhexACP in cell = 1/cell;
  species imacp in cell = 1/cell;
  species udcpp in cell = 1/cell;
  species ocdca in cell = 1/cell;
  species zn2_b in cell = 1/cell;
  species rbl_L in cell = 1/cell;
  species utp in cell = 1/cell;
  species Larab in cell = 1/cell;
  species $zn2_e_ in cell = 1/cell;
  species cdp in cell = 1/cell;
  species a_4h2oglt in cell = 1/cell;
  species ins in cell = 1/cell;
  species sbt_D in cell = 1/cell;
  species g1p in cell = 1/cell;
  species $mg2_e_ in cell = 1/cell;
  species pgp120 in cell = 1/cell;
  species RNA in cell = 1/cell;
  species arg_L in cell = 1/cell;
  species abt_L in cell = 1/cell;
  species mn2_b in cell = 1/cell;
  species tag6p_D in cell = 1/cell;
  species orot in cell = 1/cell;
  species a_2dr1p in cell = 1/cell;
  species a_4ampm in cell = 1/cell;
  species dcamp in cell = 1/cell;
  species fprica in cell = 1/cell;
  species g6p in cell = 1/cell;
  species aspsa in cell = 1/cell;
  species $k_e_ in cell = 1/cell;
  species cdpglyc in cell = 1/cell;
  species amob in cell = 1/cell;
  species $xyl_D_e_ in cell = 1/cell;
  species $gcald_e_ in cell = 1/cell;
  species ni2_b in cell = 1/cell;
  species BIOMASS in cell = 1/cell;
  species $pi_e_ in cell = 1/cell;
  species gtca2_45 in cell = 1/cell;
  species $na1_e_ in cell = 1/cell;
  species a_23dhdp in cell = 1/cell;
  species a_3dhq in cell = 1/cell;
  species gtp in cell = 1/cell;
  species fgam in cell = 1/cell;
  species a_5mthf in cell = 1/cell;
  species a_4pasp in cell = 1/cell;
  species a_2obut in cell = 1/cell;
  species e4p in cell = 1/cell;
  species melib in cell = 1/cell;
  species pa180 in cell = 1/cell;
  species ribflv_e_ in cell = 1/cell;
  species a_8aonn in cell = 1/cell;
  species gua in cell = 1/cell;
  species gal_e_ in cell = 1/cell;
  species xmp in cell = 1/cell;
  species gam1p in cell = 1/cell;
  species ahcys in cell = 1/cell;
  species leu_L in cell = 1/cell;
  species $mg2_b in cell = 1/cell;
  species dpcoa in cell = 1/cell;
  species pg140 in cell = 1/cell;
  species pg141 in cell = 1/cell;
  species anth in cell = 1/cell;
  species h2o in cell = 1/cell;
  species mmcoa_S in cell = 1/cell;
  species trnacys in cell = 1/cell;
  species etoh in cell = 1/cell;
  species h2s in cell = 1/cell;
  species arab_L_e_ in cell = 1/cell;
  species $so4_b in cell = 1/cell;
  species a_3c4mop in cell = 1/cell;
  species ppi in cell = 1/cell;
  species pa160 in cell = 1/cell;
  species pa161 in cell = 1/cell;
  species nac_e_ in cell = 1/cell;
  species dctp in cell = 1/cell;
  species a_4mhetz in cell = 1/cell;
  species ppa in cell = 1/cell;
  species din in cell = 1/cell;
  species a_1hdecg3p in cell = 1/cell;
  species dcmp in cell = 1/cell;
  species a_2ddg6p in cell = 1/cell;
  species imp in cell = 1/cell;
  species cdpdodec11eg in cell = 1/cell;
  species camp in cell = 1/cell;
  species iletrna in cell = 1/cell;
  species akg in cell = 1/cell;
  species h4spt in cell = 1/cell;
  species adpglc in cell = 1/cell;
  species lipo2_24_CA in cell = 1/cell;
  species trdox in cell = 1/cell;
  species Lcyst in cell = 1/cell;
  species pe180 in cell = 1/cell;
  species pe181 in cell = 1/cell;
  species dhf in cell = 1/cell;
  species a_4abz in cell = 1/cell;
  species $mn2_e_ in cell = 1/cell;
  species gthrd in cell = 1/cell;
  species pyr_b in cell = 1/cell;
  species raffin in cell = 1/cell;
  species a_1hdec9eg3p in cell = 1/cell;
  species gdpmann in cell = 1/cell;
  species pe140 in cell = 1/cell;
  species pe141 in cell = 1/cell;
  species pg160 in cell = 1/cell;
  species pg161 in cell = 1/cell;
  species hisp in cell = 1/cell;
  species thr_L in cell = 1/cell;
  species his_L_e_ in cell = 1/cell;
  species dtdp in cell = 1/cell;
  species atp in cell = 1/cell;
  species tagdp_D in cell = 1/cell;
  species fe2 in cell = 1/cell;
  species a_2mahmp in cell = 1/cell;
  species dttp in cell = 1/cell;
  species pa140 in cell = 1/cell;
  species pa141 in cell = 1/cell;
  species xu5p_D in cell = 1/cell;
  species uaagmda in cell = 1/cell;
  species $btn_b in cell = 1/cell;
  species toct2eACP in cell = 1/cell;
  species q8 in cell = 1/cell;
  species tcam in cell = 1/cell;
  species uri in cell = 1/cell;
  species a_3ooctACP in cell = 1/cell;
  species q8h2 in cell = 1/cell;
  species phe_L in cell = 1/cell;
  species xyl_D in cell = 1/cell;
  species g3p in cell = 1/cell;
  species ura in cell = 1/cell;
  species tyr_L in cell = 1/cell;
  species $ca2_e_ in cell = 1/cell;
  species pe160 in cell = 1/cell;
  species pe161 in cell = 1/cell;
  species pan4p in cell = 1/cell;
  species a_5prdmbz in cell = 1/cell;
  species fpram in cell = 1/cell;
  species mal_L in cell = 1/cell;
  species cu_e_ in cell = 1/cell;
  species gdpfuc in cell = 1/cell;
  species alatrna in cell = 1/cell;
  species a_10fthf in cell = 1/cell;
  species fmn in cell = 1/cell;
  species a_1odecg3p in cell = 1/cell;
  species glycogen in cell = 1/cell;
  species k in cell = 1/cell;
  species gtca3_45 in cell = 1/cell;
  species $h_e_ in cell = 1/cell;
  species glyc3p in cell = 1/cell;
  species pe120 in cell = 1/cell;
  species a_3c2hmp in cell = 1/cell;
  species h2 in cell = 1/cell;
  species ddcaACP in cell = 1/cell;
  species PLIPID in cell = 1/cell;
  species hcys_L in cell = 1/cell;
  species $mobd_e_ in cell = 1/cell;
  species so4 in cell = 1/cell;
  species G_cell_b in cell = 1/cell;
  species a_25dhpp in cell = 1/cell;
  species dudp in cell = 1/cell;
  species $G_cell_e_ in cell = 1/cell;
  species a_4r5au in cell = 1/cell;
  species ametam in cell = 1/cell;
  species dgsn in cell = 1/cell;
  species malcoa in cell = 1/cell;
  species $fru_e_ in cell = 1/cell;
  species btamp in cell = 1/cell;
  species hethmpp in cell = 1/cell;
  species h in cell = 1/cell;
  species cdpdtdec7eg in cell = 1/cell;
  species thym in cell = 1/cell;
  species acmana in cell = 1/cell;
  species succoa in cell = 1/cell;
  species glu5sa in cell = 1/cell;
  species pectate in cell = 1/cell;
  species pnto_R in cell = 1/cell;
  species datp in cell = 1/cell;
  species asptrna in cell = 1/cell;
  species citr_L in cell = 1/cell;
  species cdpdag_CA in cell = 1/cell;
  species btn in cell = 1/cell;
  species a_3hoctACP in cell = 1/cell;
  species damp in cell = 1/cell;
  species trnaval in cell = 1/cell;
  species glu_D in cell = 1/cell;
  species pptg1 in cell = 1/cell;
  species acorn in cell = 1/cell;
  species g6p_B in cell = 1/cell;
  species $cl_e_ in cell = 1/cell;
  species etha in cell = 1/cell;
  species pg120 in cell = 1/cell;
  species fdox in cell = 1/cell;
  species pyr_e_ in cell = 1/cell;
  species s in cell = 1/cell;
  species a_34hpp in cell = 1/cell;
  species air in cell = 1/cell;
  species eig3p in cell = 1/cell;
  species histd in cell = 1/cell;
  species ps180 in cell = 1/cell;
  species ps181 in cell = 1/cell;
  species db4p in cell = 1/cell;
  species gly in cell = 1/cell;
  species glx in cell = 1/cell;
  species a_1Dgali in cell = 1/cell;
  species fru in cell = 1/cell;
  species cbasp in cell = 1/cell;
  species skm5p in cell = 1/cell;
  species uaccg in cell = 1/cell;
  species a_3hpalmACP in cell = 1/cell;
  species toctd2eACP in cell = 1/cell;
  species r1p in cell = 1/cell;
  species dhpt in cell = 1/cell;
  species a_1pyr5c in cell = 1/cell;
  species thrtrna in cell = 1/cell;
  species gmp in cell = 1/cell;
  species inost in cell = 1/cell;
  species a_3haACP in cell = 1/cell;
  species uacgala in cell = 1/cell;
  species a_2ahbut in cell = 1/cell;

  // Reactions:
  BIOMASS: 0.5284 PROTEIN + 0.0655 RNA + 0.026 DNA + 0.076 PLIPID + CELLWALL + 0.0494 TRACE + 15 atp + 15 h2o => BIOMASS + 15 adp + 15 pi + 15 h; v_1();
    v_1 = 1;
  a_39: 0.775 ala_L + 0.133 arg_L + 0.156 asn_L + 0.156 asp_L + 1.216 cys_L + 0.127 gln_L + 0.127 glu_L + 1.078 gly + 0.146 his_L + 0.436 ile_L + 0.429 leu_L + 0.336 lys_L + 0.783 met_L + 0.185 phe_L + 0.457 pro_L + 0.427 ser_L + 0.41 thr_L + 0.043 trp_L + 0.801 tyr_L + 1.172 val_L + 37.195 atp + 37.195 h2o => 37.195 adp + 37.195 pi + 37.195 h + PROTEIN; v_2();
    v_2 = 1;
  a_40: 1.118 datp + 0.501 dctp + 1.118 dttp + 0.501 dgtp + 4.403 atp + 4.403 h2o => 4.403 adp + 4.403 pi + 3.236 ppi + 4.403 h + DNA; v_3();
    v_3 = 1;
  a_41: 1.554 atp + 1.124 ctp + 0.873 utp + 0.832 gtp + 1.05 h2o => 1.05 adp + 1.05 pi + 3.879 ppi + 1.05 h + RNA; v_4();
    v_4 = 1;
  a_42: 0.008 pe_CA + 0.00397 pg_CA + 0.00109 cdlp_CA => PLIPID; v_5();
    v_5 = 1;
  a_43: 6.837e-6 lipo1_24_CA + 6.123e-6 lipo2_24_CA + 1.8162e-5 lipo3_24_CA + 1.4676e-5 lipo4_24_CA + 0.00362 gtca1_45 + 0.00235 gtca2_45 + 0.00182 gtca3_45 + 0.00311 tcam + 0.010182 pptg1 + 0.996 atp + 0.996 h2o => CELLWALL + 0.996 adp + 0.996 pi + 0.996 h; v_6();
    v_6 = 1;
  a_44: 0.215 nad + 0.192 nadp + 0.199 coa + 0.321 thf + 0.313 fmn + 0.182 fad => TRACE; v_7();
    v_7 = 1;
  a_6: cellb + pi -> g1p + glc_D; v_8();
    v_8 = 1;
  a_45: malttr + pi -> g1p + cellb; v_9();
    v_9 = 1;
  CELBabc: 2 atp + $cellb_e_ + 2 h2o => 2 adp + cellb + 2 h + 2 pi; v_10();
    v_10 = 1;
  PGMT: g1p -> g6p; v_11();
    v_11 = 1;
  HEX1: atp + glc_D => adp + g6p + h; v_12();
    v_12 = 1;
  GALM2pp: glc_D -> glc_B_D; v_13();
    v_13 = 1;
  GLUK2: atp + glc_B_D => adp + g6p_B + h; v_14();
    v_14 = 1;
  PGI2: g6p_B -> f6p; v_15();
    v_15 = 1;
  PGI: g6p -> f6p; v_16();
    v_16 = 1;
  G6PI: g6p -> g6p_B; v_17();
    v_17 = 1;
  PFK: atp + f6p => adp + fdp + h; v_18();
    v_18 = 1;
  FBA: fdp -> dhap + g3p; v_19();
    v_19 = 1;
  TPI: dhap -> g3p; v_20();
    v_20 = 1;
  GLGC: atp + g1p + h => adpglc + ppi; v_21();
    v_21 = 1;
  GLCS1: adpglc => adp + glycogen + h; v_22();
    v_22 = 1;
  GLCP: glycogen + pi => g1p; v_23();
    v_23 = 1;
  GAPD: g3p + nad + pi -> a_13dpg + h + nadh; v_24();
    v_24 = 1;
  PGK: a_3pg + atp -> a_13dpg + adp; v_25();
    v_25 = 1;
  PGM: a_3pg -> a_2pg; v_26();
    v_26 = 1;
  ENO: a_2pg -> h2o + pep; v_27();
    v_27 = 1;
  PYK: adp + h + pep => atp + pyr; v_28();
    v_28 = 1;
  LDH_L: lac_L + nad -> h + nadh + pyr; v_29();
    v_29 = 1;
  PPCKG: gtp + oaa => co2 + gdp + pep; v_30();
    v_30 = 1;
  POR: coa + fdox + pyr -> accoa + co2 + fdred + h; v_31();
    v_31 = 1;
  PTAr: accoa + pi -> actp + coa; v_32();
    v_32 = 1;
  ACKr: ac + atp -> actp + adp; v_33();
    v_33 = 1;
  ACALD: acald + coa + nad -> accoa + h + nadh; v_34();
    v_34 = 1;
  ALCD2x: acald + h + nadh -> etoh + nad; v_35();
    v_35 = 1;
  FRHD: fdred + 2 h => fdox + h2; v_36();
    v_36 = 1;
  FNOR2: fdox + nadh => fdred + nad + h; v_37();
    v_37 = 1;
  FNOR3: fdred + nadp + h => fdox + nadph; v_38();
    v_38 = 1;
  CS: accoa + h2o + oaa => cit + coa + h; v_39();
    v_39 = 1;
  PC: atp + hco3 + pyr => adp + h + oaa + pi; v_40();
    v_40 = 1;
  ACONT: cit -> icit; v_41();
    v_41 = 1;
  ICDHy: icit + nadp -> akg + co2 + nadph; v_42();
    v_42 = 1;
  OOR2r: akg + coa + fdox -> co2 + fdred + h + succoa; v_43();
    v_43 = 1;
  MDH: mal_L + nad -> nadh + h + oaa; v_44();
    v_44 = 1;
  FUM: fum + h2o -> mal_L; v_45();
    v_45 = 1;
  TKT1: r5p + xu5p_D -> g3p + s7p; v_46();
    v_46 = 1;
  TKT2: e4p + xu5p_D -> f6p + g3p; v_47();
    v_47 = 1;
  PRE: ru5p_D -> xu5p_D; v_48();
    v_48 = 1;
  PRI: r5p -> ru5p_D; v_49();
    v_49 = 1;
  PRPPS: atp + r5p -> amp + h + prpp; v_50();
    v_50 = 1;
  RBK: atp + rib_D => adp + h + r5p; v_51();
    v_51 = 1;
  PPM: r1p -> r5p; v_52();
    v_52 = 1;
  DRPAr: a_2dr5p -> acald + g3p; v_53();
    v_53 = 1;
  DRBKr: atp + drib -> a_2dr5p + adp + h; v_54();
    v_54 = 1;
  PPM2: a_2dr1p -> a_2dr5p; v_55();
    v_55 = 1;
  DDGLK: a_2ddglcn + atp => a_2ddg6p + adp + h; v_56();
    v_56 = 1;
  EDA: a_2ddg6p => g3p + pyr; v_57();
    v_57 = 1;
  XYLK: atp + xylu_D => adp + h + xu5p_D; v_58();
    v_58 = 1;
  RBP4E: ru5p_L -> xu5p_D; v_59();
    v_59 = 1;
  ARAI: arab_L -> rbl_L; v_60();
    v_60 = 1;
  ARABRr: arab_L + h + nadph -> abt_L + nadp; v_61();
    v_61 = 1;
  XYLI1: xyl_D -> xylu_D; v_62();
    v_62 = 1;
  GALUi: g1p + h + utp => udpg + ppi; v_63();
    v_63 = 1;
  MNNH: mana => h2o + a_2ddglcn; v_64();
    v_64 = 1;
  MANO: mana + nad -> fruur + h + nadh; v_65();
    v_65 = 1;
  GUI1: glcur -> fruur; v_66();
    v_66 = 1;
  GUI2: galur -> tagur; v_67();
    v_67 = 1;
  PECTALASE: pectate => a_4dglc4egalur; v_68();
    v_68 = 1;
  MAN6PI: man6p -> f6p; v_69();
    v_69 = 1;
  HEX4: atp + man => adp + man6p + h; v_70();
    v_70 = 1;
  PMANM: man1p -> man6p; v_71();
    v_71 = 1;
  MAN1PT2: gdp + h + man1p => gdpmann + pi; v_72();
    v_72 = 1;
  GMAND: gdpmann => gdpddman + h2o; v_73();
    v_73 = 1;
  GFUCS: gdpddman + h + nadph => gdpfuc + nadp; v_74();
    v_74 = 1;
  FCLPA: fc1p -> dhap + lald_L; v_75();
    v_75 = 1;
  FBA2: f1p -> glyald + dhap; v_76();
    v_76 = 1;
  FRUK: atp + fru => adp + f6p + h; v_77();
    v_77 = 1;
  SBTD_Dr: nad + sbt_D -> fru + h + nadh; v_78();
    v_78 = 1;
  SBTR: glc_D + h + nadph => nadp + sbt_D; v_79();
    v_79 = 1;
  XYLI2: glc_D -> fru; v_80();
    v_80 = 1;
  UDPG4E: udpg -> udpgal; v_81();
    v_81 = 1;
  GALT: gal1p + h + utp -> ppi + udpgal; v_82();
    v_82 = 1;
  GALK: atp + gal => adp + gal1p + h; v_83();
    v_83 = 1;
  LACZ: h2o + lcts => gal + glc_D; v_84();
    v_84 = 1;
  GALS3: melib + h2o => gal + glc_D; v_85();
    v_85 = 1;
  GALS4: h2o + stchs => gal + raffin; v_86();
    v_86 = 1;
  RAFGH: h2o + raffin => gal + sucr; v_87();
    v_87 = 1;
  MELTGH: h2o + melt -> gal + sbt_D; v_88();
    v_88 = 1;
  GGLGH: ggl + h2o -> gal + glyc; v_89();
    v_89 = 1;
  GALIGH: a_1Dgali + h2o -> gal + inost; v_90();
    v_90 = 1;
  EPMGH: epm + h2o -> gal + man; v_91();
    v_91 = 1;
  PFK_2: atp + tag6p_D => adp + h + tagdp_D; v_92();
    v_92 = 1;
  G_CELLS: $G_cell_e_ + 0.65 $h2o_e_ => 0.35 $cellb_e_ + 0.3 $glc_D_e_; v_93();
    v_93 = 1;
  GLCGSD: glycogen + h2o => glc_D; v_94();
    v_94 = 1;
  PGMT_B: g6p_B -> g1p_B; v_95();
    v_95 = 1;
  XYL14BASE: a_14bxyl + h2o => xyl_D; v_96();
    v_96 = 1;
  GF6PTA: f6p + gln_L => gam6p + glu_L; v_97();
    v_97 = 1;
  HEX10: gam + atp => gam6p + adp + h; v_98();
    v_98 = 1;
  PGMAT: gam1p -> gam6p; v_99();
    v_99 = 1;
  G1PACTr: accoa + gam1p -> acgam1p + coa + h; v_100();
    v_100 = 1;
  UAGDPr: acgam1p + h + utp -> uacgam + ppi; v_101();
    v_101 = 1;
  UAGCVT: pep + uacgam => pi + uaccg; v_102();
    v_102 = 1;
  UAPGR: h + nadph + uaccg => uamr + nadp; v_103();
    v_103 = 1;
  G1PTT: dttp + g1p + h => dtdpglu + ppi; v_104();
    v_104 = 1;
  TDPGDH: dtdpglu => dtdp4d6dg + h2o; v_105();
    v_105 = 1;
  LAAF: Larab + 3 h2o => 3 arab_L; v_106();
    v_106 = 1;
  OAADC: h + oaa => co2 + pyr; v_107();
    v_107 = 1;
  ME1: mal_L + nad => co2 + nadh + pyr; v_108();
    v_108 = 1;
  PFLr: coa + pyr -> accoa + for; v_109();
    v_109 = 1;
  ACS: ac + atp + coa => accoa + amp + ppi; v_110();
    v_110 = 1;
  L_LACD3: mqn7 + lac_L -> mql7 + pyr; v_111();
    v_111 = 1;
  L_LACD2: lac_L + q8 -> q8h2 + pyr; v_112();
    v_112 = 1;
  MGSA: dhap => mthgxl + pi; v_113();
    v_113 = 1;
  LGTHL: gthrd + mthgxl => lgt_S; v_114();
    v_114 = 1;
  GLYOX: h2o + lgt_S => gthrd + h + lac_D; v_115();
    v_115 = 1;
  LALDO2x: h + mthgxl + nadh => nad + lald_L; v_116();
    v_116 = 1;
  LCARR: h + lald_L + nadh -> a_12ppd_R + nad; v_117();
    v_117 = 1;
  IPPS: a_3mob + accoa + h2o => a_3c3hmp + coa + h; v_118();
    v_118 = 1;
  ACCOAC: accoa + atp + hco3 => adp + h + malcoa + pi; v_119();
    v_119 = 1;
  FTHFL: atp + for + thf -> a_10fthf + adp + pi; v_120();
    v_120 = 1;
  MTHFC: h2o + methf -> a_10fthf + h; v_121();
    v_121 = 1;
  MTHFD: mlthf + nadp -> nadph + methf; v_122();
    v_122 = 1;
  DDPGA: a_4h2oglt -> glx + pyr; v_123();
    v_123 = 1;
  GLYCLTDx: glx + h + nadh => glyclt + nad; v_124();
    v_124 = 1;
  PGLYCP: a_2pglyc + h2o => glyclt + pi; v_125();
    v_125 = 1;
  GLYCK: atp + glyc_R => a_3pg + adp + h; v_126();
    v_126 = 1;
  GLYD: h + hpyr + nadh -> nad + glyc_R; v_127();
    v_127 = 1;
  PPCOAC: atp + hco3 + ppcoa => adp + h + mmcoa_S + pi; v_128();
    v_128 = 1;
  ACS2: atp + coa + ppa => amp + ppcoa + ppi; v_129();
    v_129 = 1;
  PPAK: adp + ppap -> atp + ppa; v_130();
    v_130 = 1;
  PTA2r: pi + ppcoa -> coa + ppap; v_131();
    v_131 = 1;
  OBTFL: coa + a_2obut -> ppcoa + for; v_132();
    v_132 = 1;
  a_2HBO: a_2hb + nad -> a_2obut + h + nadh; v_133();
    v_133 = 1;
  MCITS: h2o + oaa + ppcoa => a_2mcit + coa + h; v_134();
    v_134 = 1;
  MMCD: h + mmcoa_S => co2 + ppcoa; v_135();
    v_135 = 1;
  GLUDC: glu_L + h => a_4abut + co2; v_136();
    v_136 = 1;
  ALAR: ala_L -> ala_D; v_137();
    v_137 = 1;
  ALATRS: ala_L + trnaala + atp => alatrna + amp + ppi; v_138();
    v_138 = 1;
  ASP1DC: asp_L + h => ala_B + co2; v_139();
    v_139 = 1;
  ASPTRS: asp_L + trnaasp + atp => asptrna + amp + ppi; v_140();
    v_140 = 1;
  ADSS: asp_L + gtp + imp => dcamp + gdp + 2 h + pi; v_141();
    v_141 = 1;
  ARGSSr: asp_L + atp + citr_L -> amp + argsuc + h + ppi; v_142();
    v_142 = 1;
  ARGSL: argsuc -> arg_L + fum; v_143();
    v_143 = 1;
  ADSL1r: dcamp -> amp + fum; v_144();
    v_144 = 1;
  ASNS1: asp_L + atp + gln_L + h2o => amp + asn_L + glu_L + h + ppi; v_145();
    v_145 = 1;
  ASNS2: asp_L + atp + nh4 => amp + asn_L + h + ppi; v_146();
    v_146 = 1;
  ASNTRS: asn_L + trnaasn + atp => asntrna + amp + ppi; v_147();
    v_147 = 1;
  ASPTA: akg + asp_L -> glu_L + oaa; v_148();
    v_148 = 1;
  ASPCT: asp_L + cbp => cbasp + h + pi; v_149();
    v_149 = 1;
  ARGD: arg_L + h2o => citr_L + nh4; v_150();
    v_150 = 1;
  OCBT: cbp + orn -> citr_L + h + pi; v_151();
    v_151 = 1;
  ORNTA: akg + orn => glu_L + glu5sa; v_152();
    v_152 = 1;
  G5SADs: glu5sa -> a_1pyr5c + h + h2o; v_153();
    v_153 = 1;
  P5CR: a_1pyr5c + 2 h + nadph => nadp + pro_L; v_154();
    v_154 = 1;
  HPROa: a_1p3h5c + 2 h + nadh => a_4hpro_LT + nad; v_155();
    v_155 = 1;
  PROTRS: atp + pro_L + trnapro => protrna + amp + ppi; v_156();
    v_156 = 1;
  ARGTRS: arg_L + trnaarg + atp => argtrna + amp + ppi; v_157();
    v_157 = 1;
  EHGLAT: akg + e4hglu => a_4h2oglt + glu_L; v_158();
    v_158 = 1;
  SERAT: accoa + ser_L -> acser + coa; v_159();
    v_159 = 1;
  CYSS: acser + h2s => cys_L + ac; v_160();
    v_160 = 1;
  CYSTRS: atp + cys_L + trnacys => cystrna + amp + ppi; v_161();
    v_161 = 1;
  a_15: cys_L + akg -> glu_L + mercppyr; v_162();
    v_162 = 1;
  LCYSTAT: Lcyst + akg -> a_3spyr + glu_L; v_163();
    v_163 = 1;
  MCLOR: mercplac + nad -> mercppyr + nadh + h; v_164();
    v_164 = 1;
  GLUSy: akg + gln_L + h + nadph => 2 glu_L + nadp; v_165();
    v_165 = 1;
  GLUSx: akg + gln_L + nadh + h => 2 glu_L + nad; v_166();
    v_166 = 1;
  GLUDy: glu_L + h2o + nadp -> nadph + akg + h + nh4; v_167();
    v_167 = 1;
  GLUR: glu_D -> glu_L; v_168();
    v_168 = 1;
  GLNS: atp + glu_L + nh4 => h + adp + gln_L + pi; v_169();
    v_169 = 1;
  CBPS: 2 atp + gln_L + h2o + hco3 => 2 adp + cbp + glu_L + 2 h + pi; v_170();
    v_170 = 1;
  a_7: atp + gln_L + glutrna + h2o => glntrna + pi + h + glu_L + adp; v_171();
    v_171 = 1;
  GLUCYS: atp + cys_L + glu_L => glucys + adp + h + pi; v_172();
    v_172 = 1;
  GLUTRS: atp + glu_L + trnaglu => glutrna + amp + ppi; v_173();
    v_173 = 1;
  NADS2: atp + dnad + gln_L + h2o => amp + glu_L + h + nad + ppi; v_174();
    v_174 = 1;
  GMPS2: atp + gln_L + h2o + xmp => amp + glu_L + gmp + 2 h + ppi; v_175();
    v_175 = 1;
  GLUPRT: gln_L + h2o + prpp => glu_L + ppi + pram; v_176();
    v_176 = 1;
  PGCDr: a_3pg + nad -> nadh + a_3php + h; v_177();
    v_177 = 1;
  ASPK: asp_L + atp -> a_4pasp + adp; v_178();
    v_178 = 1;
  ASAD: aspsa + nadp + pi -> a_4pasp + h + nadph; v_179();
    v_179 = 1;
  HSDy: hom_L + nadp -> aspsa + h + nadph; v_180();
    v_180 = 1;
  HSK: atp + hom_L => adp + h + phom; v_181();
    v_181 = 1;
  THRS: h2o + phom => pi + thr_L; v_182();
    v_182 = 1;
  THRTRS: atp + thr_L + trnathr => thrtrna + amp + ppi; v_183();
    v_183 = 1;
  THRAr: thr_L -> acald + gly; v_184();
    v_184 = 1;
  THRA2: athr_L -> acald + gly; v_185();
    v_185 = 1;
  GHMT: ser_L + thf -> mlthf + gly + h2o; v_186();
    v_186 = 1;
  SERTRS: atp + ser_L + trnaser => sertrna + ppi + amp; v_187();
    v_187 = 1;
  DCPDSP_CC: 0.01 cdpdag_CA + ser_L => cmp + h + 0.01 ps_CA; v_188();
    v_188 = 1;
  PSDC_CC: 0.01 ps_CA => co2 + 0.01 psetha_CA; v_189();
    v_189 = 1;
  ATPPRTr: atp + prpp -> ppi + prbatp; v_190();
    v_190 = 1;
  PRATPP: h2o + prbatp => prbamp + ppi + h; v_191();
    v_191 = 1;
  PRAMPC: prbamp + h2o => prfp; v_192();
    v_192 = 1;
  PRMICI: prfp -> prlp; v_193();
    v_193 = 1;
  IG3PS: gln_L + prlp => aicar + eig3p + glu_L + 2 h; v_194();
    v_194 = 1;
  IGPDH: eig3p + h => h2o + imacp; v_195();
    v_195 = 1;
  HSTPTr: glu_L + imacp -> akg + h + hisp; v_196();
    v_196 = 1;
  HISTP: h2o + hisp => histd + pi; v_197();
    v_197 = 1;
  HISTD: h2o + histd + 2 nad => his_L + 2 nadh + 3 h; v_198();
    v_198 = 1;
  HISTRS: atp + his_L + trnahis => histrna + amp + ppi; v_199();
    v_199 = 1;
  DHDPS: aspsa + pyr => a_23dhdp + h + 2 h2o; v_200();
    v_200 = 1;
  DHDPRy: a_23dhdp + h + nadph => nadp + thdp; v_201();
    v_201 = 1;
  DHDPRx: a_23dhdp + nadh + h => nad + thdp; v_202();
    v_202 = 1;
  DAPDH: 2 h + nadph + nh4 + thdp => nadp + a_26dap_M; v_203();
    v_203 = 1;
  DAPDC: a_26dap_M + h => co2 + lys_L; v_204();
    v_204 = 1;
  LYSTRS: atp + lys_L + trnalys => lystrna + amp + ppi; v_205();
    v_205 = 1;
  UAAGDS: a_26dap_M + atp + uamag => adp + h + pi + ugmd; v_206();
    v_206 = 1;
  UGMDDS: alaala + atp + ugmd => ugmda + pi + h + adp; v_207();
    v_207 = 1;
  SACCD2: h2o + nad + saccrp_L -> nadh + akg + h + lys_L; v_208();
    v_208 = 1;
  HSSTr: hom_L + succoa -> coa + suchms; v_209();
    v_209 = 1;
  HSAT: hom_L + accoa -> coa + achms; v_210();
    v_210 = 1;
  METACH: achms + h2s -> ac + hcys_L; v_211();
    v_211 = 1;
  AHC: ahcys + h2o -> hcys_L + adn; v_212();
    v_212 = 1;
  CYTOM: amet + csn -> a_5mcsn + ahcys + h; v_213();
    v_213 = 1;
  METAT: atp + h2o + met_L => amet + pi + ppi; v_214();
    v_214 = 1;
  METS: a_5mthf + hcys_L => thf + h + met_L; v_215();
    v_215 = 1;
  HCYSMT: amet + hcys_L => met_L + ahcys + h; v_216();
    v_216 = 1;
  ADMDC: amet + h -> ametam + co2; v_217();
    v_217 = 1;
  MTAN: a_5mta + h2o => a_5mtr + ade; v_218();
    v_218 = 1;
  MTRK: a_5mtr + atp => a_5mdr1p + adp + h; v_219();
    v_219 = 1;
  MTRI: a_5mdr1p -> a_5mdru1p; v_220();
    v_220 = 1;
  DAHPS: e4p + h2o + pep => a_2dda7p + pi; v_221();
    v_221 = 1;
  DHQS: a_2dda7p => a_3dhq + pi; v_222();
    v_222 = 1;
  DHQD1: a_3dhq -> a_3dhsk + h2o; v_223();
    v_223 = 1;
  SHK3D: a_3dhsk + h + nadph -> nadp + skm; v_224();
    v_224 = 1;
  SHKK: atp + skm => adp + skm5p + h; v_225();
    v_225 = 1;
  PSCVT: pep + skm5p -> a_3psme + pi; v_226();
    v_226 = 1;
  CHORS: a_3psme => chor + pi; v_227();
    v_227 = 1;
  CHORM: chor => pphn; v_228();
    v_228 = 1;
  PPND: nad + pphn => nadh + a_34hpp + co2; v_229();
    v_229 = 1;
  TYRTA: akg + tyr_L -> a_34hpp + glu_L; v_230();
    v_230 = 1;
  PPNDH: h + pphn => h2o + co2 + phpyr; v_231();
    v_231 = 1;
  PHETA1: akg + phe_L -> phpyr + glu_L; v_232();
    v_232 = 1;
  ANS1: chor + gln_L => anth + glu_L + h + pyr; v_233();
    v_233 = 1;
  ANPRT: anth + prpp => ppi + pran; v_234();
    v_234 = 1;
  PRAI: pran -> a_2cpr5p; v_235();
    v_235 = 1;
  IGPS: a_2cpr5p + h => a_3ig3p + co2 + h2o; v_236();
    v_236 = 1;
  TRPS1: a_3ig3p + ser_L => g3p + h2o + trp_L; v_237();
    v_237 = 1;
  TRPS2: indole + ser_L => h2o + trp_L; v_238();
    v_238 = 1;
  TRPS3: a_3ig3p => g3p + indole; v_239();
    v_239 = 1;
  PYRDC: thmpp + pyr => hethmpp + co2; v_240();
    v_240 = 1;
  ACLS: 2 pyr + h => alac_S + co2; v_241();
    v_241 = 1;
  ACHBS: pyr + a_2obut + h => a_2ahbut + co2; v_242();
    v_242 = 1;
  KARA1: a_23dhmb + nadp -> nadph + alac_S + h; v_243();
    v_243 = 1;
  KARA2: a_2ahbut + h + nadph -> nadp + a_23dhmp; v_244();
    v_244 = 1;
  DHAD1: a_23dhmb => a_3mob + h2o; v_245();
    v_245 = 1;
  DHAD2: a_23dhmp => h2o + a_3mop; v_246();
    v_246 = 1;
  ILETA: akg + ile_L -> a_3mop + glu_L; v_247();
    v_247 = 1;
  VALTA: akg + val_L -> a_3mob + glu_L; v_248();
    v_248 = 1;
  VALTRS: atp + trnaval + val_L => valtrna + amp + ppi; v_249();
    v_249 = 1;
  ILETRS: atp + ile_L + trnaile => iletrna + amp + ppi; v_250();
    v_250 = 1;
  IPPMIB: a_2ippm + h2o -> a_3c3hmp; v_251();
    v_251 = 1;
  IPPMIa: a_3c2hmp -> a_2ippm + h2o; v_252();
    v_252 = 1;
  IPMD: a_3c2hmp + nad => a_3c4mop + nadh + h; v_253();
    v_253 = 1;
  OMCDC: a_3c4mop + h => a_4mop + co2; v_254();
    v_254 = 1;
  LEUTA: a_4mop + glu_L -> akg + leu_L; v_255();
    v_255 = 1;
  LEUTRS: atp + leu_L + trnaleu => leutrna + amp + ppi; v_256();
    v_256 = 1;
  ADPRDP: adprib + h2o => amp + 2 h + r5p; v_257();
    v_257 = 1;
  PRAGSr: atp + gly + pram -> adp + gar + h + pi; v_258();
    v_258 = 1;
  GARFT: a_10fthf + gar -> fgam + h + thf; v_259();
    v_259 = 1;
  PRFGS: atp + fgam + gln_L + h2o => adp + fpram + glu_L + 2 h + pi; v_260();
    v_260 = 1;
  PRIAS: atp + fpram => adp + air + 2 h + pi; v_261();
    v_261 = 1;
  AIRCr: air + co2 -> a_5aizc + h; v_262();
    v_262 = 1;
  PRASCS: a_5aizc + asp_L + atp -> a_25aics + adp + pi + h; v_263();
    v_263 = 1;
  ADSL2r: a_25aics -> aicar + fum; v_264();
    v_264 = 1;
  ADPT: ade + prpp => amp + ppi; v_265();
    v_265 = 1;
  AICART: a_10fthf + aicar -> fprica + thf; v_266();
    v_266 = 1;
  IMPC: fprica -> h2o + imp; v_267();
    v_267 = 1;
  ATPM: atp + h2o => adp + h + pi; v_268();
    v_268 = 1;
  RNTR1: atp + trdrd => datp + h2o + trdox; v_269();
    v_269 = 1;
  RNTR2: gtp + trdrd => dgtp + trdox + h2o; v_270();
    v_270 = 1;
  RNTR3: ctp + trdrd => dctp + trdox + h2o; v_271();
    v_271 = 1;
  RNTR4: trdrd + utp => trdox + dutp + h2o; v_272();
    v_272 = 1;
  PYK2: gdp + h + pep => gtp + pyr; v_273();
    v_273 = 1;
  PYK5: dadp + h + pep => datp + pyr; v_274();
    v_274 = 1;
  PYK6: dgdp + h + pep => dgtp + pyr; v_275();
    v_275 = 1;
  ADNCYC: atp => ppi + camp; v_276();
    v_276 = 1;
  ADK1: amp + atp -> 2 adp; v_277();
    v_277 = 1;
  DADK: atp + damp -> adp + dadp; v_278();
    v_278 = 1;
  ADK2: amp + pppi -> ppi + adp; v_279();
    v_279 = 1;
  RNDR1: adp + trdrd => dadp + trdox + h2o; v_280();
    v_280 = 1;
  RNDR2: gdp + trdrd => dgdp + trdox + h2o; v_281();
    v_281 = 1;
  RNDR3: cdp + trdrd => dcdp + trdox + h2o; v_282();
    v_282 = 1;
  RNDR4: trdrd + udp => trdox + dudp + h2o; v_283();
    v_283 = 1;
  PUNP1: adn + pi -> ade + r1p; v_284();
    v_284 = 1;
  PUNP2: dad_2 + pi -> a_2dr1p + ade; v_285();
    v_285 = 1;
  PUNP3: gsn + pi -> gua + r1p; v_286();
    v_286 = 1;
  PUNP4: dgsn + pi -> a_2dr1p + gua; v_287();
    v_287 = 1;
  PUNP5: ins + pi -> hxan + r1p; v_288();
    v_288 = 1;
  PUNP6: din + pi -> a_2dr1p + hxan; v_289();
    v_289 = 1;
  PUNP7: pi + xtsn -> r1p + xan; v_290();
    v_290 = 1;
  DURIPP: duri + pi -> a_2dr1p + ura; v_291();
    v_291 = 1;
  NTD1: dump + h2o => duri + pi; v_292();
    v_292 = 1;
  NTD10: h2o + xmp => pi + xtsn; v_293();
    v_293 = 1;
  NTD2: h2o + ump => uri + pi; v_294();
    v_294 = 1;
  NTD3: dcmp + h2o => dcyt + pi; v_295();
    v_295 = 1;
  NTD4: cmp + h2o => cytd + pi; v_296();
    v_296 = 1;
  NTD5: dtmp + h2o => pi + thymd; v_297();
    v_297 = 1;
  NTD6: damp + h2o => dad_2 + pi; v_298();
    v_298 = 1;
  NTD7: amp + h2o => adn + pi; v_299();
    v_299 = 1;
  NTD8: dgmp + h2o => dgsn + pi; v_300();
    v_300 = 1;
  NTD9: gmp + h2o => gsn + pi; v_301();
    v_301 = 1;
  NTD11: h2o + imp => ins + pi; v_302();
    v_302 = 1;
  ADNK1: adn + atp => adp + amp + h; v_303();
    v_303 = 1;
  HXPRT: hxan + prpp => imp + ppi; v_304();
    v_304 = 1;
  GUAPRT: gua + prpp => ppi + gmp; v_305();
    v_305 = 1;
  XPPT: prpp + xan => ppi + xmp; v_306();
    v_306 = 1;
  IMPD: h2o + imp + nad => h + nadh + xmp; v_307();
    v_307 = 1;
  DGK1: atp + dgmp -> adp + dgdp; v_308();
    v_308 = 1;
  GK1: atp + gmp -> adp + gdp; v_309();
    v_309 = 1;
  NTPTP1: dgtp + h2o => dgsn + pppi; v_310();
    v_310 = 1;
  GTPDPK: atp + gtp => amp + gdptp + h; v_311();
    v_311 = 1;
  ADNCYC2: gtp => cgmp + ppi; v_312();
    v_312 = 1;
  DHORTS: dhor_S + h2o -> cbasp + h; v_313();
    v_313 = 1;
  DHORD2: dhor_S + q8 => q8h2 + orot; v_314();
    v_314 = 1;
  DHORD5: dhor_S + mqn7 => mql7 + orot; v_315();
    v_315 = 1;
  ORPT: orot5p + ppi -> orot + prpp; v_316();
    v_316 = 1;
  OMPDC: h + orot5p => co2 + ump; v_317();
    v_317 = 1;
  UMPK: atp + ump -> adp + udp; v_318();
    v_318 = 1;
  CYTK1: atp + cmp -> adp + cdp; v_319();
    v_319 = 1;
  CYTK2: atp + dcmp -> dcdp + adp; v_320();
    v_320 = 1;
  CTPS2: atp + gln_L + h2o + utp => adp + ctp + glu_L + 2 h + pi; v_321();
    v_321 = 1;
  CTPS1: atp + nh4 + utp => adp + ctp + 2 h + pi; v_322();
    v_322 = 1;
  UPPRT: prpp + ura => ppi + ump; v_323();
    v_323 = 1;
  PYNP2R: pi + uri -> r1p + ura; v_324();
    v_324 = 1;
  CSND: csn + h + h2o => nh4 + ura; v_325();
    v_325 = 1;
  PYNP1r: csn + r1p -> cytd + pi; v_326();
    v_326 = 1;
  CYTD: cytd + h + h2o => nh4 + uri; v_327();
    v_327 = 1;
  DCYTD: dcyt + h2o + h => nh4 + duri; v_328();
    v_328 = 1;
  TRDR: h + nadph + trdox => nadp + trdrd; v_329();
    v_329 = 1;
  DCMPDA2ir: dcmp + h + h2o => dump + nh4; v_330();
    v_330 = 1;
  TMDS: dump + mlthf => dhf + dtmp; v_331();
    v_331 = 1;
  DTMPK: atp + dtmp -> adp + dtdp; v_332();
    v_332 = 1;
  URIDK2r: atp + dump -> adp + dudp; v_333();
    v_333 = 1;
  MCSNAH1r: a_5mcsn + h + h2o -> nh4 + thym; v_334();
    v_334 = 1;
  DUTPDP: dutp + h2o => dump + h + ppi; v_335();
    v_335 = 1;
  CODHr: accoa + 2 fdox + h2o + h4spt -> coa + 2 fdred + co2 + 2 h + mh4spt; v_336();
    v_336 = 1;
  HCO3E: co2 + h2o -> hco3 + h; v_337();
    v_337 = 1;
  PPA: h2o + ppi => 2 pi + h; v_338();
    v_338 = 1;
  ATPS4r: adp + pi + 4 $h_e_ -> atp + 3 h + h2o; v_339();
    v_339 = 1;
  NADH5: h + nadh + q8 => nad + q8h2; v_340();
    v_340 = 1;
  MCOATA: ACP + malcoa -> malACP + coa; v_341();
    v_341 = 1;
  a_3OAS100: h + malACP + ocACP => a_3odecACP + ACP + co2; v_342();
    v_342 = 1;
  a_3OAS120: dcaACP + h + malACP => a_3oddecACP + ACP + co2; v_343();
    v_343 = 1;
  a_3OAS140: ddcaACP + h + malACP => a_3omrsACP + ACP + co2; v_344();
    v_344 = 1;
  a_3OAS160: h + malACP + myrsACP => a_3opalmACP + ACP + co2; v_345();
    v_345 = 1;
  a_3OAS80: h + hexACP + malACP => a_3ooctACP + ACP + co2; v_346();
    v_346 = 1;
  a_3OAS60: butACP + h + malACP => a_3ohexACP + ACP + co2; v_347();
    v_347 = 1;
  ACOATA: ACP + accoa -> acACP + coa; v_348();
    v_348 = 1;
  KAS14: acACP + malACP + h => ACP + actACP + co2; v_349();
    v_349 = 1;
  MCMAT8: h + malACP + palmACP => a_3ooctdACP + ACP + co2; v_350();
    v_350 = 1;
  a_3OAR100: a_3odecACP + h + nadph -> nadp + a_3hdecACP; v_351();
    v_351 = 1;
  a_3OAR120: a_3oddecACP + h + nadph -> nadp + a_3hddecACP; v_352();
    v_352 = 1;
  a_3OAR140: a_3omrsACP + h + nadph -> a_3hmrsACP + nadp; v_353();
    v_353 = 1;
  a_3OAR160: a_3opalmACP + h + nadph -> nadp + a_3hpalmACP; v_354();
    v_354 = 1;
  a_3OAR180: a_3ooctdACP + nadph + h -> nadp + a_3hoctaACP; v_355();
    v_355 = 1;
  a_3OAR40: actACP + nadph + h -> nadp + a_3haACP; v_356();
    v_356 = 1;
  a_3OAR60: a_3ohexACP + h + nadph -> a_3hhexACP + nadp; v_357();
    v_357 = 1;
  a_3OAR80: a_3ooctACP + nadph + h -> a_3hoctACP + nadp; v_358();
    v_358 = 1;
  a_3HAD100: a_3hdecACP => h2o + tdec2eACP; v_359();
    v_359 = 1;
  a_3HAD40: a_3haACP => but2eACP + h2o; v_360();
    v_360 = 1;
  a_3HAD60: a_3hhexACP => h2o + thex2eACP; v_361();
    v_361 = 1;
  a_3HAD80: a_3hoctACP => h2o + toct2eACP; v_362();
    v_362 = 1;
  a_3HAD120: a_3hddecACP => h2o + tddec2eACP; v_363();
    v_363 = 1;
  a_3HAD140: a_3hmrsACP => h2o + tmrs2eACP; v_364();
    v_364 = 1;
  a_3HAD160: a_3hpalmACP => h2o + tpalm2eACP; v_365();
    v_365 = 1;
  a_3HAD180: a_3hoctaACP => h2o + toctd2eACP; v_366();
    v_366 = 1;
  EAR40x: but2eACP + h + nadh => nad + butACP; v_367();
    v_367 = 1;
  EAR60x: h + nadh + thex2eACP => hexACP + nad; v_368();
    v_368 = 1;
  EAR80x: h + nadh + toct2eACP => nad + ocACP; v_369();
    v_369 = 1;
  EAR100X: h + nadh + tdec2eACP => nad + dcaACP; v_370();
    v_370 = 1;
  EAR120x: h + nadh + tddec2eACP => nad + ddcaACP; v_371();
    v_371 = 1;
  EAR140x: h + nadh + tmrs2eACP => myrsACP + nad; v_372();
    v_372 = 1;
  EAR160x: h + nadh + tpalm2eACP => nad + palmACP; v_373();
    v_373 = 1;
  EAR180x: h + nadh + toctd2eACP => nad + ocdcaACP; v_374();
    v_374 = 1;
  FA120ACPHi: ddcaACP + h2o => ACP + ddca + h; v_375();
    v_375 = 1;
  FA140ACPHi: h2o + myrsACP => ACP + h + ttdca; v_376();
    v_376 = 1;
  FA160ACPHi: h2o + palmACP => ACP + h + hdca; v_377();
    v_377 = 1;
  FA180ACPH: h2o + ocdcaACP -> ACP + ocdca + h; v_378();
    v_378 = 1;
  FACOAL160: atp + coa + hdca -> pmtcoa + amp + ppi; v_379();
    v_379 = 1;
  G3PD1: glyc3p + nad -> nadh + h + dhap; v_380();
    v_380 = 1;
  CLPNS: 0.01 cdpdag_CA + 0.01 pg_CA => 0.01 cdlp_CA + cmp + h; v_381();
    v_381 = 1;
  a_34: 8.89 pg140 + 71.58 pg160 + 6.22 pg161 + 3.33 pg180 + 10 pg181 => pg_CA; v_382();
    v_382 = 1;
  PGPPH1: h2o + pgp120 => pg120 + pi; v_383();
    v_383 = 1;
  PGPPH2: h2o + pgp140 => pg140 + pi; v_384();
    v_384 = 1;
  PGPPH3: h2o + pgp141 => pg141 + pi; v_385();
    v_385 = 1;
  PGPPH4: h2o + pgp160 => pg160 + pi; v_386();
    v_386 = 1;
  PGPPH5: h2o + pgp161 => pg161 + pi; v_387();
    v_387 = 1;
  PGPPH6: h2o + pgp180 => pg180 + pi; v_388();
    v_388 = 1;
  PGPPH7: h2o + pgp181 => pg181 + pi; v_389();
    v_389 = 1;
  PGSA120: cdpdddecg + glyc3p => cmp + h + pgp120; v_390();
    v_390 = 1;
  PGSA140: cdpdtdecg + glyc3p => cmp + h + pgp140; v_391();
    v_391 = 1;
  PGSA141: cdpdtdec7eg + glyc3p => cmp + h + pgp141; v_392();
    v_392 = 1;
  PGSA160: cdpdhdecg + glyc3p => cmp + h + pgp160; v_393();
    v_393 = 1;
  PGSA161: cdpdhdec9eg + glyc3p => cmp + h + pgp161; v_394();
    v_394 = 1;
  PGSA180: cdpdodecg + glyc3p => cmp + h + pgp180; v_395();
    v_395 = 1;
  PGSA181: cdpdodec11eg + glyc3p => cmp + h + pgp181; v_396();
    v_396 = 1;
  PSSA120: cdpdddecg + ser_L => cmp + h + ps120; v_397();
    v_397 = 1;
  PSSA140: cdpdtdecg + ser_L => cmp + h + ps140; v_398();
    v_398 = 1;
  PSSA141: cdpdtdec7eg + ser_L => cmp + h + ps141; v_399();
    v_399 = 1;
  PSSA160: cdpdhdecg + ser_L => cmp + h + ps160; v_400();
    v_400 = 1;
  PSSA161: cdpdhdec9eg + ser_L => cmp + h + ps161; v_401();
    v_401 = 1;
  PSSA180: cdpdodecg + ser_L => cmp + h + ps180; v_402();
    v_402 = 1;
  PSSA181: cdpdodec11eg + ser_L => cmp + h + ps181; v_403();
    v_403 = 1;
  DASYN120: ctp + h + pa120 => cdpdddecg + ppi; v_404();
    v_404 = 1;
  DASYN140: ctp + h + pa140 => cdpdtdecg + ppi; v_405();
    v_405 = 1;
  DASYN141: ctp + h + pa141 => cdpdtdec7eg + ppi; v_406();
    v_406 = 1;
  DASYN160: ctp + h + pa160 => cdpdhdecg + ppi; v_407();
    v_407 = 1;
  DASYN161: ctp + h + pa161 => cdpdhdec9eg + ppi; v_408();
    v_408 = 1;
  DASYN180: ctp + h + pa180 => cdpdodecg + ppi; v_409();
    v_409 = 1;
  DASYN181: ctp + h + pa181 => cdpdodec11eg + ppi; v_410();
    v_410 = 1;
  AGPAT120: a_1ddecg3p + ddcaACP => ACP + pa120; v_411();
    v_411 = 1;
  AGPAT140: a_1tdecg3p + myrsACP => ACP + pa140; v_412();
    v_412 = 1;
  AGPAT141: a_1tdec7eg3p + tdeACP => ACP + pa141; v_413();
    v_413 = 1;
  AGPAT160: a_1hdecg3p + palmACP => ACP + pa160; v_414();
    v_414 = 1;
  AGPAT161: a_1hdec9eg3p + hdeACP => ACP + pa161; v_415();
    v_415 = 1;
  AGPAT180: a_1odecg3p + ocdcaACP => ACP + pa180; v_416();
    v_416 = 1;
  AGPAT181: a_1odec11eg3p + octeACP => ACP + pa181; v_417();
    v_417 = 1;
  a_16: h2o + pe120 => a_12dgr120 + ethap + 2 h; v_418();
    v_418 = 1;
  a_17: h2o + pe140 => a_12dgr140 + ethap + 2 h; v_419();
    v_419 = 1;
  a_18: pe141 + h2o => a_12dgr141 + ethap + 2 h; v_420();
    v_420 = 1;
  a_19: h2o + pe160 => a_12dgr160 + ethap + 2 h; v_421();
    v_421 = 1;
  a_20: h2o + pe161 => a_12dgr161 + ethap + 2 h; v_422();
    v_422 = 1;
  a_21: pe180 + h2o => a_12dgr180 + ethap + 2 h; v_423();
    v_423 = 1;
  a_22: h2o + pe181 => a_12dgr181 + ethap + 2 h; v_424();
    v_424 = 1;
  DAGK120: a_12dgr120 + atp => pa120 + adp + h; v_425();
    v_425 = 1;
  DAGK140: a_12dgr140 + atp => pa140 + adp + h; v_426();
    v_426 = 1;
  DAGK141: a_12dgr141 + atp => pa141 + adp + h; v_427();
    v_427 = 1;
  DAGK160: a_12dgr160 + atp => pa160 + adp + h; v_428();
    v_428 = 1;
  DAGK161: a_12dgr161 + atp => pa161 + adp + h; v_429();
    v_429 = 1;
  DAGK180: a_12dgr180 + atp => pa180 + adp + h; v_430();
    v_430 = 1;
  DAGK181: a_12dgr181 + atp => pa181 + adp + h; v_431();
    v_431 = 1;
  G3PAT120: ddcaACP + glyc3p => a_1ddecg3p + ACP; v_432();
    v_432 = 1;
  G3PAT140: myrsACP + glyc3p => a_1tdecg3p + ACP; v_433();
    v_433 = 1;
  G3PAT141: tdeACP + glyc3p => a_1tdec7eg3p + ACP; v_434();
    v_434 = 1;
  G3PAT160: palmACP + glyc3p => a_1hdecg3p + ACP; v_435();
    v_435 = 1;
  G3PAT161: glyc3p + hdeACP => ACP + a_1hdec9eg3p; v_436();
    v_436 = 1;
  G3PAT180: ocdcaACP + glyc3p => a_1odecg3p + ACP; v_437();
    v_437 = 1;
  G3PAT181: octeACP + glyc3p => a_1odec11eg3p + ACP; v_438();
    v_438 = 1;
  PSD120: h + ps120 => pe120 + co2; v_439();
    v_439 = 1;
  PSD140: ps140 + h => pe140 + co2; v_440();
    v_440 = 1;
  PSD141: ps141 + h => pe141 + co2; v_441();
    v_441 = 1;
  PSD160: h + ps160 => pe160 + co2; v_442();
    v_442 = 1;
  PSD161: h + ps161 => pe161 + co2; v_443();
    v_443 = 1;
  PSD180: h + ps180 => pe180 + co2; v_444();
    v_444 = 1;
  PSD181: h + ps181 => pe181 + co2; v_445();
    v_445 = 1;
  a_35: 8.89 pe140 + 71.58 pe160 + 6.22 pe161 + 3.33 pe180 + 10 pe181 => pe_CA; v_446();
    v_446 = 1;
  a_36: 8.89 cdpdtdecg + 71.58 cdpdhdecg + 6.22 cdpdhdec9eg + 3.33 cdpdodecg + 10 cdpdodec11eg => cdpdag_CA; v_447();
    v_447 = 1;
  a_30: tdeACP -> tmrs2eACP; v_448();
    v_448 = 1;
  a_31: hdeACP -> tpalm2eACP; v_449();
    v_449 = 1;
  a_32: octeACP -> toctd2eACP; v_450();
    v_450 = 1;
  ALCD19_D: glyald + nadph + h -> glyc + nadp; v_451();
    v_451 = 1;
  GLYK: atp + glyc => adp + glyc3p + h; v_452();
    v_452 = 1;
  G3PCT: ctp + glyc3p + h => ppi + cdpglyc; v_453();
    v_453 = 1;
  a_33: 8.89 a_12dgr140 + 71.58 a_12dgr160 + 6.22 a_12dgr161 + 3.33 a_12dgr180 + 10 a_12dgr181 => a_12dgr_CA; v_454();
    v_454 = 1;
  UGT: 0.01 a_12dgr_CA + 2 udpg => 0.01 d12dg_CA + 2 h + 2 udp; v_455();
    v_455 = 1;
  LIPO4S24_CA: 2400 cdpglyc + d12dg_CA => 2400 cmp + 2400 h + lipo4_24_CA; v_456();
    v_456 = 1;
  LIPO1S24_CA: 2400 cdpglyc + d12dg_CA + 2400 udpg => 2400 cmp + 4800 h + lipo1_24_CA + 2400 udp; v_457();
    v_457 = 1;
  LIPO2S24_CA: 2400 cdpglyc + d12dg_CA + 2400 uacgam => 2400 cmp + 4800 h + lipo2_24_CA + 2400 udp; v_458();
    v_458 = 1;
  LIPO3S24_CA: 2400 ala_D + 2400 atp + 2400 cdpglyc + d12dg_CA + 2400 h2o => 2400 amp + 2400 cmp + 4800 h + lipo3_24_CA + 2400 ppi; v_459();
    v_459 = 1;
  TECA1S45: 45 cdpglyc + uacgam + uacmam => 45 cmp + gtca1_45 + udp + ump; v_460();
    v_460 = 1;
  TECA3S45: 45 cdpglyc + h2o + uacgam + uacmam + 45 udpg => 45 cmp + gtca3_45 + 91 h + 46 udp + ump; v_461();
    v_461 = 1;
  TECA2S45: 45 ala_D + 45 atp + 45 cdpglyc + 45 h2o + uacgam + uacmam => 45 amp + 45 cmp + gtca2_45 + 91 h + 45 ppi + udp + ump; v_462();
    v_462 = 1;
  TECA4S: 30 h2o + 30 uacgala + 30 udpg => 60 h + tcam + 30 udp + 30 ump; v_463();
    v_463 = 1;
  UAG4E: uacgam => uacgala; v_464();
    v_464 = 1;
  UAG2E: uacgam -> uacmam; v_465();
    v_465 = 1;
  UAG2EMA: h2o + uacgam -> acmana + h + udp; v_466();
    v_466 = 1;
  ALAALA: 2 ala_D + atp -> alaala + adp + pi + h; v_467();
    v_467 = 1;
  UAMAGS: atp + glu_D + uama => uamag + adp + h + pi; v_468();
    v_468 = 1;
  UAMAS: ala_L + atp + uamr => adp + uama + h + pi; v_469();
    v_469 = 1;
  PANTS: ala_B + atp + pant_R => amp + h + pnto_R + ppi; v_470();
    v_470 = 1;
  PAPPT3: udcpp + ugmda => uagmda + ump; v_471();
    v_471 = 1;
  PAPPT1: udcpp + uAgla => uaAgla + ump; v_472();
    v_472 = 1;
  PAPPT2: udcpp + uGgla => uaGgla + ump; v_473();
    v_473 = 1;
  UAGPT3: uagmda + uacgam => udp + uaagmda + h; v_474();
    v_474 = 1;
  UDCPDP: h2o + udcpdp => h + pi + udcpp; v_475();
    v_475 = 1;
  PPTGS_CC: uaagmda => h + pptg1 + udcpdp; v_476();
    v_476 = 1;
  AMAOT: a_8aonn + amet -> amob + dann; v_477();
    v_477 = 1;
  BTS: dtbt + 2 s => h + h2s + btn; v_478();
    v_478 = 1;
  BACCL: atp + btn + h => ppi + btamp; v_479();
    v_479 = 1;
  BTNPL: apoC_Lys + btamp => apoC_Lys_btn + amp + h; v_480();
    v_480 = 1;
  GTPCI: gtp + h2o => ahdt + for + h; v_481();
    v_481 = 1;
  AKP1: ahdt + 3 h2o => dhnpt + 2 h + 3 pi; v_482();
    v_482 = 1;
  DHNPA: dhnpt => a_2ahhmp + gcald; v_483();
    v_483 = 1;
  HPPK: a_2ahhmp + atp => a_2ahhmd + amp + h; v_484();
    v_484 = 1;
  DHPS3: a_2ahhmd + a_4abz => dhpt + ppi; v_485();
    v_485 = 1;
  DHPS: a_2ahhmp + a_4abz => dhpt + h2o; v_486();
    v_486 = 1;
  DHFS: atp + dhpt + glu_L => adp + dhf + h + pi; v_487();
    v_487 = 1;
  DHFOR2: dhf + nadp -> nadph + fol; v_488();
    v_488 = 1;
  DHFR: dhf + h + nadph -> nadp + thf; v_489();
    v_489 = 1;
  THFGLUS: atp + glu_L + thf -> adp + h + pi + thfglu; v_490();
    v_490 = 1;
  NADK: atp + nad => nadp + adp + h; v_491();
    v_491 = 1;
  NNATr: atp + h + nicrnt -> dnad + ppi; v_492();
    v_492 = 1;
  NNDPR: 2 h + prpp + quln => co2 + nicrnt + ppi; v_493();
    v_493 = 1;
  QULNS: dhap + iasp => 2 h2o + pi + quln; v_494();
    v_494 = 1;
  ASPO1: asp_L + nad => 2 h + nadh + iasp; v_495();
    v_495 = 1;
  NCTPPRT: nicrnt + ppi -> h + nac + prpp; v_496();
    v_496 = 1;
  FMETTRS: a_10fthf + mettrna => fmettrna + thf; v_497();
    v_497 = 1;
  FTHFCL: a_5fthf + atp => adp + methf + pi; v_498();
    v_498 = 1;
  MOHMT: a_3mob + h2o + mlthf => a_2dhp + thf; v_499();
    v_499 = 1;
  DPR: a_2dhp + h + nadph => nadp + pant_R; v_500();
    v_500 = 1;
  PNTK: atp + pnto_R => a_4ppan + adp + h; v_501();
    v_501 = 1;
  PPNCL: a_4ppan + ctp + cys_L => a_4ppcys + cdp + h + pi; v_502();
    v_502 = 1;
  PPCDC: a_4ppcys + h => co2 + pan4p; v_503();
    v_503 = 1;
  PTPAT: atp + h + pan4p -> dpcoa + ppi; v_504();
    v_504 = 1;
  DPCOAK: atp + dpcoa => adp + coa + h; v_505();
    v_505 = 1;
  ACPS1: apoACP + coa => ACP + h + pap; v_506();
    v_506 = 1;
  RBFK: atp + ribflv => adp + fmn + h; v_507();
    v_507 = 1;
  FMNATr: atp + fmn + h -> fad + ppi; v_508();
    v_508 = 1;
  RBFSb: 2 dmlz => a_4r5au + ribflv; v_509();
    v_509 = 1;
  CobT: dmbzid + nicrnt => a_5prdmbz + nac + h; v_510();
    v_510 = 1;
  RBFSa: a_4r5au + db4p => dmlz + 2 h2o + pi; v_511();
    v_511 = 1;
  PMDPHT: a_5aprbu + h2o => a_4r5au + pi; v_512();
    v_512 = 1;
  APRAUR: a_5apru + h + nadph => nadp + a_5aprbu; v_513();
    v_513 = 1;
  DHPPDA2: a_25dhpp + h + h2o => a_5apru + nh4; v_514();
    v_514 = 1;
  DB4PS: ru5p_D => db4p + for + h; v_515();
    v_515 = 1;
  TMDPK: atp + thm => thmpp + amp + h; v_516();
    v_516 = 1;
  TDP: h2o + thmpp => thmmp + h + pi; v_517();
    v_517 = 1;
  TMPPP: a_2mahmp + a_4mpetz + h => ppi + thmmp; v_518();
    v_518 = 1;
  PMPK: a_4ampm + atp => a_2mahmp + adp; v_519();
    v_519 = 1;
  HETZK: a_4mhetz + atp => a_4mpetz + adp + h; v_520();
    v_520 = 1;
  THMP: h2o + thmmp => pi + thm; v_521();
    v_521 = 1;
  NIabc: atp + h2o + $ni2_e_ => ni2 + adp + h + pi; v_522();
    v_522 = 1;
  ARBabc: 2 atp + 2 h2o + arab_L_e_ => arab_L + 2 pi + 2 h + 2 adp; v_523();
    v_523 = 1;
  GLCabc: 2 atp + 2 h2o + $glc_D_e_ => glc_D + 2 adp + 2 h + 2 pi; v_524();
    v_524 = 1;
  XYLabc: 2 atp + 2 h2o + $xyl_D_e_ => xyl_D + 2 adp + 2 h + 2 pi; v_525();
    v_525 = 1;
  FRUabc: 2 atp + 2 h2o + $fru_e_ => fru + 2 adp + 2 h + 2 pi; v_526();
    v_526 = 1;
  GALabc: 2 atp + 2 h2o + gal_e_ => gal + 2 adp + 2 h + 2 pi; v_527();
    v_527 = 1;
  MANabc: 2 atp + 2 h2o + $man_e_ => man + 2 adp + 2 h + 2 pi; v_528();
    v_528 = 1;
  RIBabc: 2 atp + 2 h2o + $rib_D_e_ => rib_D + 2 adp + 2 h + 2 pi; v_529();
    v_529 = 1;
  Coabc: atp + $cobalt2_e_ + h2o => cobalt2 + adp + h + pi; v_530();
    v_530 = 1;
  MGt5: mg2 -> $mg2_e_; v_531();
    v_531 = 1;
  HISabc: atp + h2o + his_L_e_ => his_L + adp + h + pi; v_532();
    v_532 = 1;
  ARGabc: atp + h2o + arg_L_e_ => arg_L + adp + h + pi; v_533();
    v_533 = 1;
  LYSabc: atp + h2o + $lys_L_e_ => lys_L + adp + h + pi; v_534();
    v_534 = 1;
  ORNabc: atp + h2o + orn_e_ => orn + adp + h + pi; v_535();
    v_535 = 1;
  NAt3_1: $h_e_ + na1 -> $na1_e_ + h; v_536();
    v_536 = 1;
  ZN2t4: $h_e_ + $k_e_ + zn2 => h + k + $zn2_e_; v_537();
    v_537 = 1;
  BTNt2r: $btn_e_ + $h_e_ -> btn + h; v_538();
    v_538 = 1;
  CAt6: ca2 + $na1_e_ -> $ca2_e_ + na1; v_539();
    v_539 = 1;
  CUt3: cu + $h_e_ => cu_e_ + h; v_540();
    v_540 = 1;
  Kt3g: $h_e_ + k -> h + $k_e_; v_541();
    v_541 = 1;
  NH4t3R: $h_e_ + nh4 -> h + $nh4_e_; v_542();
    v_542 = 1;
  THMt3: h + thm_e_ -> $h_e_ + thm; v_543();
    v_543 = 1;
  FE2abc: atp + $fe2_e_ + h2o => fe2 + adp + h + pi; v_544();
    v_544 = 1;
  MNabc: atp + h2o + $mn2_e_ => mn2 + adp + h + pi; v_545();
    v_545 = 1;
  MOBDabc: atp + h2o + $mobd_e_ => mobd + adp + h + pi; v_546();
    v_546 = 1;
  PIabc: atp + h2o + $pi_e_ => 2 pi + adp + h; v_547();
    v_547 = 1;
  PIt8: 3 $na1_e_ + $pi_e_ => 3 na1 + pi; v_548();
    v_548 = 1;
  a_4ABZt2r: $a_4abz_e_ + $h_e_ -> a_4abz + h; v_549();
    v_549 = 1;
  TRPt2: $na1_e_ + trp_L_e_ => na1 + trp_L; v_550();
    v_550 = 1;
  GLNabc: atp + $gln_L_e_ + h2o => gln_L + adp + h + pi; v_551();
    v_551 = 1;
  RIBFLVt6: $h_e_ + ribflv_e_ -> h + ribflv; v_552();
    v_552 = 1;
  NACUP: nac_e_ => nac; v_553();
    v_553 = 1;
  PNTOt2: $h_e_ + pnto_R_e_ -> h + pnto_R; v_554();
    v_554 = 1;
  ETOHt1: $etoh_e_ -> etoh; v_555();
    v_555 = 1;
  ACt6: $ac_e_ + $h_e_ -> ac + h; v_556();
    v_556 = 1;
  L_LACt2: $h_e_ + $lac_L_e_ -> h + lac_L; v_557();
    v_557 = 1;
  PYRt2: $h_e_ + pyr_e_ -> h + pyr; v_558();
    v_558 = 1;
  SULabc: atp + h2o + $so4_e_ => so4 + adp + h + pi; v_559();
    v_559 = 1;
  CO2t: $co2_e_ -> co2; v_560();
    v_560 = 1;
  H2Ot5: $h2o_e_ -> h2o; v_561();
    v_561 = 1;
  H2td: h2 -> $h2_e_; v_562();
    v_562 = 1;
  EX_h_e_: $h_e_ -> $h_b; v_563();
    v_563 = 1;
  EX_fe2_e_: $fe2_e_ -> $fe2_b; v_564();
    v_564 = 1;
  EX_so4_e_: $so4_e_ -> $so4_b; v_565();
    v_565 = 1;
  EX_pi_e_: $pi_e_ -> $pi_b; v_566();
    v_566 = 1;
  EX_nh4_e_: $nh4_e_ -> $nh4_b; v_567();
    v_567 = 1;
  EX_mg2_e_: $mg2_e_ -> $mg2_b; v_568();
    v_568 = 1;
  EX_k_e_: $k_e_ -> $k_b; v_569();
    v_569 = 1;
  EX_h2o_e_: $h2o_e_ -> $h2o_b; v_570();
    v_570 = 1;
  EX_glc_e_: $glc_D_e_ -> $glc_D_b; v_571();
    v_571 = 1;
  EX_cellb_e_: $cellb_e_ -> cellb_b; v_572();
    v_572 = 1;
  EX_mn2_e_: $mn2_e_ -> mn2_b; v_573();
    v_573 = 1;
  EX_zn2_e_: $zn2_e_ -> zn2_b; v_574();
    v_574 = 1;
  EX_cu_e_: cu_e_ -> cu_b; v_575();
    v_575 = 1;
  EX_4abz_e_: $a_4abz_e_ -> $a_4abz_b; v_576();
    v_576 = 1;
  EX_btn_e_: $btn_e_ -> $btn_b; v_577();
    v_577 = 1;
  EX_ac_e_: $ac_e_ -> $ac_b; v_578();
    v_578 = 1;
  EX_n2_e_: $n2_e_ -> $n2_b; v_579();
    v_579 = 1;
  EX_na1_e_: $na1_e_ -> $na1_b; v_580();
    v_580 = 1;
  EX_cl_e_: $cl_e_ -> $cl_b; v_581();
    v_581 = 1;
  EX_ca2_e_: $ca2_e_ -> ca2_b; v_582();
    v_582 = 1;
  EX_mobd_e_: $mobd_e_ -> mobd_b; v_583();
    v_583 = 1;
  EX_ni2_e_: $ni2_e_ -> ni2_b; v_584();
    v_584 = 1;
  EX_cobalt2_e_: $cobalt2_e_ -> cobalt2_b; v_585();
    v_585 = 1;
  EX_nac_e_: nac_e_ -> nac_b; v_586();
    v_586 = 1;
  EX_ribflv_e_: ribflv_e_ -> ribflv_b; v_587();
    v_587 = 1;
  EX_pnto_R_e_: pnto_R_e_ -> pnto_R_b; v_588();
    v_588 = 1;
  EX_thm_e_: thm_e_ -> thm_b; v_589();
    v_589 = 1;
  EX_h2_e_: $h2_e_ -> $h2_b; v_590();
    v_590 = 1;
  EX_co2_e_: $co2_e_ -> $co2_b; v_591();
    v_591 = 1;
  EX_lac_L_e_: $lac_L_e_ -> $lac_L_b; v_592();
    v_592 = 1;
  EX_pyr_e_: pyr_e_ -> pyr_b; v_593();
    v_593 = 1;
  EX_etoh_e_: $etoh_e_ -> $etoh_b; v_594();
    v_594 = 1;
  EX_BIOMASS_e_: BIOMASS => $BIOMASS_b; v_595();
    v_595 = 1;
  ALATA_L: akg + ala_L -> glu_L + pyr; v_596();
    v_596 = 1;
  THRD_L: thr_L => a_2obut + nh4; v_597();
    v_597 = 1;
  SADT1r: atp + h + so4 -> aps + ppi; v_598();
    v_598 = 1;
  APSPTi: aps + trdrd => amp + 2 h + so3 + trdox; v_599();
    v_599 = 1;
  SULR: 3 h2o + h2s + 3 nadp -> 3 nadph + 4 h + so3; v_600();
    v_600 = 1;
  MTHFR1: 2 h + mlthf + nadph => nadp + a_5mthf; v_601();
    v_601 = 1;
  ACGS: accoa + glu_L => acglu + coa + h; v_602();
    v_602 = 1;
  ACGK: acglu + atp => adp + acg5p; v_603();
    v_603 = 1;
  AGPR: acg5sa + nadp + pi -> acg5p + nadph + h; v_604();
    v_604 = 1;
  ACOTA: acorn + akg -> acg5sa + glu_L; v_605();
    v_605 = 1;
  ORNTAC: acorn + glu_L -> acglu + orn; v_606();
    v_606 = 1;
  G5SD: glu5p + h + nadph => glu5sa + nadp + pi; v_607();
    v_607 = 1;
  GLU5K: atp + glu_L => adp + glu5p; v_608();
    v_608 = 1;
  TAL: g3p + s7p -> e4p + f6p; v_609();
    v_609 = 1;
  PYK4: udp + h + pep => utp + pyr; v_610();
    v_610 = 1;
  NADPK4: atp + dtdp -> adp + dttp; v_611();
    v_611 = 1;
  ETHAAL: etha => acald + nh4; v_612();
    v_612 = 1;
  a_38: h + ethap + h2o => etha + pi; v_613();
    v_613 = 1;
  a_37: gcald -> $gcald_e_; v_614();
    v_614 = 1;
  EX_gcald_e_: $gcald_e_ => $gcald_b; v_615();
    v_615 = 1;
  EX_G_cell_e_: $G_cell_e_ -> G_cell_b; v_616();
    v_616 = 1;
  SUCD1: fum + fdred + 2 h -> succ + fdox; v_617();
    v_617 = 1;
  SUCCt6: $h_e_ + $succ_e_ -> h + succ; v_618();
    v_618 = 1;
  FORt2: $for_e_ + $h_e_ -> for + h; v_619();
    v_619 = 1;
  EX_succ_e_: $succ_e_ -> $succ_b; v_620();
    v_620 = 1;
  EX_for_e_: $for_e_ -> $for_b; v_621();
    v_621 = 1;
end
